V_out := 3.3
I_outMax := 1.5
V_ripple := 0.5
V_in := 12
V_sat := 1
V_F := 0.3
relat := (V_out + V_F)/(V_in - V_sat - V_out) = 0.467532
sum := 1/50000
t_off := sum/(relat + 1) = 1.36283e-5
t_on := sum - t_off = 6.37168e-6
C_T := 4*10^-5*t_on = 2.54867e-10
I_pk := 2*I_outMax = 3
L_min := ((V_in - V_sat - V_out)/I_pk)*t_on*10^6 = 16.354
C_O := I_pk*(t_on + t_off)*10^6/(8*V_ripple) = 15
